# Варіант 14.Лихацький Денис КН-42/2
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# Метод Простої Ітерації | Метод Ньютона
ε := 0.001
TOL := 0.001
f(x) := 5*sin(x) - x + 0.5
a := 2.5
b := 2.7
f(a)*f(b) = -0.0626186
f1(x) := d/dx(f(x)) → 5*cos(x) - 1
f2(x) := d/dx(f1(x)) → -5*sin(x)
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m := f1(b) = -5.52036
M := f1(a) = -5.00572
λ := -1/m
λ = 0.181148
q := |(M - m)/(M + m)| = 0.0488922
f2(a) = -2.99236
f1(a) = -5.00572
root(f(x), x, 2.5, 2.7) = 2.68854
f2(b) = -2.1369
f1(b) = -5.52036
xx0 := a = 2.5
ϕ(x) := 5*sin(x) + 0.5
# Універсальна формула еквівалентної функції
xx1 := xx0 - f(xx0)/f1(xx0) = 2.69825
ΔΔ1 := |xx1 - xx0| = 0.198245
ΔΔ1 < ε = 0
ϕ1(x) := d/dx(ϕ(x)) → 5*cos(x)
ϕ2(x) := x + λ*f(x)
x0 := a = 2.5
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xx2 := xx1 - f(xx1)/f1(xx1) = 2.68856
ΔΔ2 := |xx2 - xx1| = 0.00968313
ΔΔ2 < ε = 0
x1 := ϕ2(x0) = 2.67976
Δ1 := |x1 - x0| = 0.179764
Δ1 < ε = 0
xx3 := xx2 - f(xx2)/f1(xx2) = 2.68854
ΔΔ3 := |xx3 - xx2| = 1.84211e-5
ΔΔ3 < ε = 1
ϕ1(a) = -4.00572
x2 := ϕ2(x1) = 2.68849
Δ2 := |x2 - x1| = 0.00872535
Δ2 < ε = 0
ϕ1(b) = -4.52036
x3 := ϕ2(x2) = 2.68854
Δ3 := |x3 - x2| = 5.45339e-5
Δ3 < ε = 1
# Умова збіжності методу не виконується,тому використовую універсальну формулу еквівалентної функції
